<?xml version="1.0"?>
<Node name="root" gravity="0 0 0" dt="1"  >

	<VisualStyle displayFlags="showVisualModels showWireframe showBehaviorModels hideCollisionModels hideMappings hideForceFields" />
	<RequiredPlugin pluginName="SkeletonPlugin"/>
	<RequiredPlugin pluginName='SofaOpenglVisual'/>
	<ViewerSetting resolution="1200 1200" />

	<Node name="Vessels" activated="1">
		<MeshObjLoader name='myLoader' filename='data/mesh/vesselSegment.obj'/>
		<OglModel name="visualModel" src='@myLoader' color="1 0.6 0.6 1"/>
		<MeshSkeletonization template="Vec3d" name="skel" inputVertices="@myLoader.position" inputTriangles="@myLoader.triangles" />
	</Node>

	<!-- NOTE:
	The position and lines should be passed directly from MeshSkeletonization to BeamFEMForceField.
	I will implement a quick Engine to do that.
	In the mean time use generated files and copy/paste them.
	You may have to order the points and edges before feeding them to BeamFEMForceField.
	 -->
	<Node name="Beams" activated="1">
	        <MechanicalObject template="Rigid3d" name="BeamDOFs" position="0.00671732 0.00198818 0.200274 0 0 0 1 0.00525121 0.00274144 0.200697 0 0 0 1 0.0144205 0.000200659 0.196766 0 0 0 1 0.00381526 0.00325765 0.201011 0 0 0 1 -0.000413926 0.00384828 0.201621 0 0 0 1 -0.00269336 0.00367566 0.201811 0 0 0 1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" />
	        <MeshTopology name="lines" points="@BeamDOFs.position" lines="51 22 22 0 0 1 51 21 42 3 1 42 21 23 3 33 23 31 41 32 41 2 33 24 24 34 34 4 4 45 45 25 25 5 5 17 6 7 7 8 8 35 35 9 9 36 36 10 46 10 26 47 26 48 26 11 52 49 47 52 49 12 37 27 11 37 28 12 28 14 15 14 43 38 13 38 43 29 16 17 18 30 30 50 44 19 44 40 19 20 20 17 31 32 18 46 13 27 29 16 15 39 50 40 "/>
		<SphereCollisionModel radius="0.0000"/>
		<UniformMass  totalMass="0.1" showAxisSizeFactor="0.001"/>
	        <BeamFEMForceField name="BeamFEM" radius="0.005" youngModulus="5000" poissonRatio="0.49"/>
        </Node>


</Node>
